T
# AguaClara Water Treatment Plants
# Automated Design
# Add variable descriptions next to every varible so it is easy to interpret what this all means.
AguaClaraDesignToolVersion := 10  # This is used by LabVIEW to confirm that a valid design tool program is open
# User Inputs:
HW_Sed := 2 m
# AutoCAD References
# Design References
# [reference: BasicInputs.xmcd]
# Use BasicClientInputs and ExpertClientInputs when this is run by LabVIEW.
# Use BasicInputs and ExpertInputs to use the program in MathCAD
# Change the reference by
# - right clicking
# - select properties
# - reference tab
# - type in the correct file name
# [reference: ExpertInputs.xmcd]
# [reference: DesignAssumptions.xmcd]
# [reference: MathFunctions.xmcd]
# [reference: PipeDatabase.xmcd]
# [reference: MinorLossCoefficients.xmcd]
# [reference: FluidsFunctions.xmcd]
# Sed Tanks and Slopes:
HW_Sed = 2 m
# [reference: Influent Sed Manifold.xmcd]
N_SedTanks = 3
B_SedPort = 5.85864 cm  # Height of the narrowest part of the manifold ports
W_SedPort = 5.85864 cm
H_SedBetween = 7.62 cm  # Distance from the top of the inlet manifold to the bottom of the ledge supporting the lamella frame
N_SedPorts = 31  # per bay
L_Sed = 9.52822 m
N_SedBays = 2  # Number of bays of inlet manifolds in each sed tank
A_SedPort = 34.3237 cm^2  # Port Area
L_SedPort = 6.76498 cm  # Length of the port through which water exits the inlet manifold
W_SedSludgeFlat = 5 cm  # Distance between tips of manifold plates (space alloted for the drain holes
W_SedSlopePlate = 30 cm  # Width of ferrous cement plates in whice one manifold port is cut
AN_SedTopInlet = 60 deg  # Angle of the top of the inlet manifold
Q_SedBay = 8.33333 L/s
42.5
AN_SedBottom = 10 deg  # Angle of the bottom of inlet manifold
L_SedSlopeManifold = 0.867897 m
W_SedSlopePlateRemaining = 0.228221 m  # This is the extra distance between the last slope and the wall
# Sedimentation Tank Sludge Drain:
(W_Sed/2 - T_ChannelWall/2)/2 = 0.50225 m
# [reference: SludgeDrain.xmcd]
# We need to make the Drain plate width separate from the drain width
outerdiameter(4 in) = 11.43 cm
N_SedSludgeOrifices = 63  # per cell
W_SedSludge =  # error: This variable is undefined.  # Width of the sludge channel
Ti_SludgeDrain = 10 min  # Tank Drain time
0.1140/2 = 0.057
H_SedSludge = 12 cm  # Depth of the sludge channel
B_SedSludgeOrifices = 15 cm  # Distance center to center between drain orifices
T_SedSludge = 9.33013 cm
# Thickness of the plate topping the sludge channel
# through which drain holes are formed
0.8540 m/2 - W_SedSludge/2 =  # error
D_SedSludgeOrifice =  # error  # Diameter of drain orifices
# Sedimentation Tank Dimensions:
W_SedSludge =  # error
# [reference: Sedimentation Dimensions.xmcd]
T_SedInletSlope = 0.05 m
Z_SedSludge = 21.3301 cm  # Height from 0 of the top of the sludge drain
(W_Sed/2 - T_ChannelWall/2)/2 - W_SedSludge/2 =  # error
H_SedBottomSlope = 0.0765169 m  # Height of the bottom slope
H_SedTopSlope = 0.751621 m  # Height of the top of the inlet manifold
0.442 - 0.2915 = 0.1505
Z_SedSlopes = 1.06492 m  # Height from 0 of the top of the inlet manifold
1.004 m/2 - W_SedSludge/2 =  # error
T_SedSludge + H_SedSludge = 0.213301 m
H_Sed = 2.1 m  # Total tank wall height
T_SedInletSlope*cos(AN_SedTopInlet) = 2.5 cm
W_Sed = 2.159 m  # Total tank width
# Total tank length
12 + 9.33 = 21.33
L_Sed = 9.52822 m
T_SedInletSlope*sin(90 - AN_SedTopInlet) + T_SedInletSlope*cos(AN_SedTopInlet) = 0.0667521 m
# Inlet Channel:
2*(T_SedInletSlope*sin(90 - AN_SedTopInlet) + T_SedInletSlope*cos(AN_SedTopInlet)) + W_SedSludgeFlat + 5 cm = 0.233504 m
# [reference: Inlet Channel.xmcd]
W_InletChannel = 0.666545 m
HW_Sed - HW_InletChannel - T_ChannelWall = 1.14112 m
L_Channel = 6.927 m
HW_Sed - HW_InletChannel - T_ChannelWall - (0.3633 m - T_ChannelWall) = 0.927823 m
W_SedManifoldEntrance = 0.172129 m  # Width of the drop chimneys connecting channel to sed inlet manifolds
L_SedManifoldEntrance = 0.433949 m  # length of drop chimmneys
N_SedInletPipes = 2  # per sed bay
H_InletChannel = 0.808877 m
# Sedimentation Tank Effluent Launder:
# [reference: Launder.xmcd]
N_SedLaunderOrifices = 160  # Number of orifices per launder
# How many launders per cell?
# What is the spacing of the orfices?
# How many rows of orifices per launder?
Q_SedLaunderOrifices = 1.5625 L/min
B_SedLaunderOrifices = 0.1 m  # Center to center launder spacing
# Exit Channel:
# [reference: Exit Channel.xmcd]
W_ExitChannel = 0.666545 m
ND_SedLaunder = 6 in
H_ExitChannel = 0.808877 m
L_SedLaunder = 8.04513 m
L_ExitChannel = 6.927 m
H_PltWeir = 0.574502 m  # height of the weir carrying water to the distribution tank
D_SedLaunderOrifice = 0.3125 in
HW_ExitChannel = 0.668877 m
Z_SedLaunder = 1.87586 m  # height from 0 of the launder
ZW_ExitChannel = 1.96 m  # water height in exit channel from 0
# Lamella:
# [reference: Lamella.xmcd]
L_SedPlate = 0.751251 m
42.5 in = 1.0795 m
B_SedPlate = 4.09535 cm  # center to center distance between lamella
S_SedPlate = 3.79535 cm  # spacing between lamella
N_SedPlates = 161  # Number of Sed Plates per Sedimentation Tank Bay.
AN_SedPlate = 60 deg
V_SedC = 10.0099 m/day
V_SedUp = 70 m/day
H_SedPlate = 0.650602 m
H_SedAbove = 0.208275 m  # Height of water needed above the lamella
# Sedimentation Tank Floc Hopper:
# [reference: Floc Hopper.xmcd]
A_FlocHopper = 2.592 m^2
L_FlocHopper = 2.58039 m  # Length of the hopper cement plate
L_FlocHopperOffset = 0.375626 m  # distance from the edge of the channel to the bottom of the first lamella (collection distance)
W_FlocHopper = 1.0045 m  # width of the hopper set within each bay
# Flow Controller:
# [reference: FCM.xmcd]
N_Fcm = 6
ID_FcmTube = 4.318 mm
ID_FcmTube = 0.17 in
L_FcmTube = 257.56 cm
Q_FcmTubeMax = 375 mL/min
HL_FcmValve = 26.1265 cm
# Flocculator: | Look at Flocculator Positioning arrays
# [reference: Flocculation Energy Dissapation.xmcd]
W_FlocChannel = 0.719212 m
L_Sed = 9.52822 m  # Fill last channel with bafffles from last channel
# Fix port width to be based on energy dissipation in that channel
# Adjust spacing after the number of baffles per channel is known.
ED_Floc = [6.4; 1.6; 0.4] mW/kg
# Check the residence time of the flocculator should be at least 20minutes
S_FlocBaffle = [39.685; 62.9961; 100] cm
B_FlocBaffle = [43.685; 66.9961; 104] cm
HW_FlocEnd = 2 m
L_FlocBaffles = [
    1.60315, 1.60315, 1.37004, 1.37004, 1;
    1.90744, 1.90744, 1.67433, 1.30429, 1.30429;
    1.60315, 1.60315, 1.37004, 1, 1;
    1.90744, 1.90744, 1.67433, 1.30429, 1.30429;
    1.60315, 1.37004, 1.37004, 1, 1;
    1.90744, 1.67433, 1.67433, 1.30429, 1.30429;
    1.60315, 1.37004, 1.37004, 1, 1;
    1.90744, 1.67433, 1.67433, 1.30429, 1.30429;
    1.60315, 1.37004, 1.37004, 0, 0;
    1.90744, 1.67433, 1.67433, 0, 0;
    1.60315, 1.37004, 1.37004, 0, 0;
    1.90744, 1.67433, 1.67433, 0, 0;
    1.60315, 1.37004, 0, 0, 0;
    1.90744, 0, 0, 0, 0;
    1.60315, 0, 0, 0, 0;
    1.90744, 0, 0, 0, 0;
    1.60315, 0, 0, 0, 0;
    1.90744, 0, 0, 0, 0
] m
X_FlocBaffles = [
    8.48822, 1.015, 8.51322, 1.015, 8.51322;
    8.05137, 1.45185, 7.84326, 2.055, 7.47322;
    7.61452, 1.8887, 7.1733, 3.095, 6.43322;
    7.17767, 2.32555, 6.50334, 4.135, 5.39322;
    6.74082, 2.99551, 5.83338, 5.175, 4.35322;
    6.30397, 3.66547, 5.16342, 6.215, 3.31322;
    5.86712, 4.33543, 4.49346, 7.255, 2.27322;
    5.43027, 5.00539, 3.8235, 8.295, 1.23322;
    4.99342, 5.67535, 3.15354, 0, 0;
    4.55657, 6.34531, 2.48358, 0, 0;
    4.11972, 7.01527, 1.81362, 0, 0;
    3.68287, 7.68523, 1.14365, 0, 0;
    3.24602, 8.3552, 0, 0, 0;
    2.80917, 0, 0, 0, 0;
    2.37232, 0, 0, 0, 0;
    1.93547, 0, 0, 0, 0;
    1.49862, 0, 0, 0, 0;
    1.06177, 0, 0, 0, 0
] m
N_FlocChannels = 5
L_FlocTank = 47.6411 m
N_FlocBaffleSection = [21; 21; 21]
3*21 = 63
HL_Floc = 20.429 cm
HW_FlocStart = 2.20429 m
Z_FlocBaffles = [
    0, 0, 0, 0, 0;
    0.39685, 0.39685, 0.629961, 1, 1;
    0, 0, 0, 0, 0;
    0.39685, 0.39685, 0.629961, 1, 1;
    0, 0, 0, 0, 0;
    0.39685, 0.629961, 0.629961, 1, 1;
    0, 0, 0, 0, 0;
    0.39685, 0.629961, 0.629961, 1, 1;
    0, 0, 0, 0, 0;
    0.39685, 0.629961, 0.629961, 0, 0;
    0, 0, 0, 0, 0;
    0.39685, 0.629961, 0.629961, 0, 0;
    0, 0, 0, 0, 0;
    0.39685, 0, 0, 0, 0;
    0, 0, 0, 0, 0;
    0.39685, 0, 0, 0, 0;
    0, 0, 0, 0, 0;
    0.39685, 0, 0, 0, 0
] m
W_FlocPort = 1 m
H_FlocPort = 0.6285 m
Ti_Floc = 22.8427 min  # residence time of the flocculator
L_FlocBaffleLower = [1.60315; 1.37004; 1] m
L_FlocBaffleUpper = [1.90744; 1.67433; 1.30429] m
# Entrance Tank:
# [reference: EntranceTankDim.xmcd]
L_Et = 9.52822 m  # length of the entrance tank
W_Et = 0.719212 m  # width of the entrance tank
HW_EtMin = 0.2 m
HW_EtMax = 0.4 m
H_Et = 2.60429 m  # height of the entrance tank
ZW_Et = 2.50429 m
# Any additional needed elevations should be calculated in the files above.
# Elevations:
ZW_ExitChannel = 1.96 m  # Water Level at the end of the plant in the exit channel and exit channel box
HW_Sed = 2 m
HW_FlocStart = 2.20429 m  # Water level at the beginning of the floc tank
HL_Floc = 20.429 cm  # just for ref. the head loss throught the floc tank
ZW_Et = 2.50429 m  # the height of the water in the entrance tank.
# Rapid Mix:
# [reference: RapidMixer.xmcd]
# Assumptions: To be moved to basic inputs file
W_EtOrifice[30] = 0.031 m  # Height of Entrance Tank Orifice
# Calculations
L_trueET[30] = 1.29264 m  # Length of Entrance Tank Orifice
Pi_EtFlow[30] = 0.278388  # Ratio of the minimum flow divided by the maximum flow through the plant.
L_FlocEntryOrifice = 71.9212 cm  # Length of orifice entering into flocculator from Rapid Mix Unit
W_FlocEntryOrifice = 12.1424 cm  # Height of orifice entering into flocculator
ED_Diffusion = 0.732512 m^2/s^3  # Minimum Energy Dissipation needed
HL_FlocEntryOrifice = 7.13979 cm  # Head loss caused by entering flocculation tank.
A_FlocEntry = 0.0873298 m^2  # Area required of entry port to flocculator
A_EtOrifice = 400.718 cm^2  # Area of Entrance Tank Orifice
HW_Total = 2.69961 m  # Total Height of water at beginning of rapid mix unit
HW_Channel2 = 14.7603 cm  # Height of water at the back of the entrance tank channel (from channel bottom)
HW_EtChannel = 7.63195 cm  # Height of Waterfall into flocculator
W_EtChannel = 39.685 cm  # Widt of entrance tank channel
L_Et = 2.48424 m  # Length of square entrance tank
Vol_Stock = 4050 L  # Volume of chemical stock tanks
# [reference: AutoCADMasterProgram.xmcd]
# AutoCAD References
